OpenVSP model (file version 4), 5 components.
Geometry view with OpenVSP parameter names; values to 6 digits, angles in degrees, lengths in the model's unit.
Overall bounding box: X_Min=-34.5825 X_Len=37.9233 Y_Min=-2.36997 Y_Len=4.73994 Z_Min=-2.36997 Z_Len=4.73994

Stack "StackGeom"
  location (X Y Z) -9.43108 0 0, rotation 0 0 0
  bounding box size 9.93108 4.73994 4.73994
  cross sections:
    n  XDelta   YDelta  ZDelta  shape
    0  0        0       0       point
    1  2.36997  0       0       circle Circle_Diameter=4.73994
    2  5.19113  0       0       as above
    3  2.36997  0       0       point

Stack "StackGeom"
  location (X Y Z) -34.5825 0 0, rotation 0 0 0
  bounding box size 24.06 4.73994 4.73994
  cross sections:
    n  XDelta   YDelta  ZDelta  shape
    0  0        0       0       point
    1  2.36997  0       0       circle Circle_Diameter=4.73994
    2  19.32    0       0       as above
    3  2.36997  0       0       point

Stack "StackGeom"
  location (X Y Z) 1 0 0, rotation 0 0 0
  bounding box size 0.621026 0.699951 0.699951
  cross sections:
    n  XDelta    YDelta  ZDelta  shape
    0  0         0       0       point
    1  0         0       0       circle Circle_Diameter=0.699951
    2  0.400492  0       0       as above
    3  0.103876  0       0       circle Circle_Diameter=0.4922

Stack "StackGeom"
  location (X Y Z) 1.50437 0 0, rotation 0 0 0
  bounding box size 3.34087 2.28255 2.28255
  cross sections:
    n  XDelta   YDelta  ZDelta  shape
    0  0        0       0       circle Circle_Diameter=0.4922
    1  3.34084  0       0       circle Circle_Diameter=2.28255
    2  0        0       0       as above

Stack "StackGeom"
  location (X Y Z) 0 0 0, rotation 0 0 0
  bounding box size 3.5 3 2.5
  cross sections:
    n  XDelta   YDelta  ZDelta  shape
    0  0        0       0       point
    1  0.5      0       0       circle Circle_Diameter=4.77014
    2  35.0825  0       0       as above
    3  0.5      0       0       point
